Thu Aug 26 00:22:17 EDT 2021
$PROB base
; Drug X; one compartment
; estimat
$INPUT ID TIME AMT DROP DV MDV NUM
$DATA ../../../data/dat1.csv ignore=@

$SUBR ADVAN1 TRANS2
$EST MET=1 PRINT=5 NOABORT INTER

$PK
    TVCL = THETA(1)
    TVV  = THETA(2)

    CL  = TVCL * EXP(ETA(1))
    V   = TVV * EXP(ETA(2))

    S1 = V

$ERROR

IPRED = F
Y  = IPRED * (1 + ERR(1))

$THETA
(0, 5) ; CL
(0, 20) ; V

$OMEGA
0.1
0.1

$SIGMA 0.01
$COVR
$TAB ID NUM TIME AMT DV MDV IPRED PRED CWRES NPDE NOPRINT NOAPPEND ONEHEADER FILE=r2.tab
$TAB ID CL V ETAS(1:LAST) NOPRINT NOAPPEND FIRSTONLY ONEHEADER FILE=r2par.tab

NM-TRAN MESSAGES
 WARNINGS AND ERRORS (IF ANY) FOR PROBLEM    1
 (WARNING  2) NM-TRAN INFERS THAT THE DATA ARE POPULATION.

1NONLINEAR MIXED EFFECTS MODEL PROGRAM (NONMEM) VERSION 7.4.4
 ORIGINALLY DEVELOPED BY STUART BEAL, LEWIS SHEINER, AND ALISON BOECKMANN
 CURRENT DEVELOPERS ARE ROBERT BAUER, ICON DEVELOPMENT SOLUTIONS,
 AND ALISON BOECKMANN. IMPLEMENTATION, EFFICIENCY, AND STANDARDIZATION
 PERFORMED BY NOUS INFOSYSTEMS.
 PROBLEM NO.:         1
 base
 TOT. NO. OF OBS RECS:      500
 TOT. NO. OF INDIVIDUALS:       50
 ONE COMPARTMENT MODEL (ADVAN1)
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 #TBLN:      1
 #METH: First Order Conditional Estimation with Interaction
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
 #TERM:
0MINIMIZATION SUCCESSFUL
 NO. OF FUNCTION EVALUATIONS USED:      198
 NO. OF SIG. DIGITS IN FINAL EST.:  4.4

 ETABAR IS THE ARITHMETIC MEAN OF THE ETA-ESTIMATES,
 AND THE P-VALUE IS GIVEN FOR THE NULL HYPOTHESIS THAT THE TRUE MEAN IS 0.

 ETABAR:         6.1855E-04 -5.4073E-04
 SE:             3.9768E-02  3.8973E-03
 N:                      50          50

 P VAL.:         9.8759E-01  8.8965E-01

 ETASHRINKSD(%)  1.0000E-10  4.2689E+01
 ETASHRINKVR(%)  1.0000E-10  6.7154E+01
 EBVSHRINKSD(%)  8.0696E-01  4.3249E+01
 EBVSHRINKVR(%)  1.6074E+00  6.7794E+01
 EPSSHRINKSD(%)  6.3380E+00
 EPSSHRINKVR(%)  1.2274E+01


 TOTAL DATA POINTS NORMALLY DISTRIBUTED (N):          500
 N*LOG(2PI) CONSTANT TO OBJECTIVE FUNCTION:    918.93853320467269
 OBJECTIVE FUNCTION VALUE WITHOUT CONSTANT:   -2035.4472637660970
 OBJECTIVE FUNCTION VALUE WITH CONSTANT:      -1116.5087305614243
 REPORTED OBJECTIVE FUNCTION DOES NOT CONTAIN CONSTANT

 TOTAL EFFECTIVE ETAS (NIND*NETA):                           100


 #TERE:
 Elapsed estimation  time in seconds:     0.73
 Elapsed covariance  time in seconds:     0.26
 Elapsed postprocess time in seconds:     0.14

 ********************               FIRST ORDER CONDITIONAL ESTIMATION WITH INTERACTION              ********************
 #OBJT:**************                       MINIMUM VALUE OF OBJECTIVE FUNCTION                      ********************
 #OBJV:********************************************    -2035.447       **************************************************

 ********************               FIRST ORDER CONDITIONAL ESTIMATION WITH INTERACTION              ********************
 ********************                             FINAL PARAMETER ESTIMATE                           ********************

 THETA - VECTOR OF FIXED EFFECTS PARAMETERS   *********
         TH 1      TH 2
         1.05E+01  4.96E+01

 OMEGA - COV MATRIX FOR RANDOM EFFECTS - ETAS  ********
         ETA1      ETA2
 ETA1
+        8.05E-02
 ETA2
+        0.00E+00  2.36E-03

 SIGMA - COV MATRIX FOR RANDOM EFFECTS - EPSILONS  ****
         EPS1
 EPS1
+        2.65E-02

 OMEGA - CORR MATRIX FOR RANDOM EFFECTS - ETAS  *******
         ETA1      ETA2
 ETA1
+        2.84E-01
 ETA2
+        0.00E+00  4.86E-02

 SIGMA - CORR MATRIX FOR RANDOM EFFECTS - EPSILONS  ***
         EPS1
 EPS1
+        1.63E-01

 ********************               FIRST ORDER CONDITIONAL ESTIMATION WITH INTERACTION              ********************
 ********************                            STANDARD ERROR OF ESTIMATE                          ********************

 THETA - VECTOR OF FIXED EFFECTS PARAMETERS   *********
         TH 1      TH 2
         4.36E-01  6.54E-01

 OMEGA - COV MATRIX FOR RANDOM EFFECTS - ETAS  ********
         ETA1      ETA2
 ETA1
+        1.37E-02
 ETA2
+       .........  1.51E-03

 SIGMA - COV MATRIX FOR RANDOM EFFECTS - EPSILONS  ****
         EPS1
 EPS1
+        2.07E-03

 OMEGA - CORR MATRIX FOR RANDOM EFFECTS - ETAS  *******
         ETA1      ETA2
 ETA1
+        2.42E-02
 ETA2
+       .........  1.55E-02

 SIGMA - CORR MATRIX FOR RANDOM EFFECTS - EPSILONS  ***
         EPS1
 EPS1
+        6.36E-03

 ********************               FIRST ORDER CONDITIONAL ESTIMATION WITH INTERACTION              ********************
 ********************                          COVARIANCE MATRIX OF ESTIMATE                         ********************

            TH 1      TH 2      OM11      OM12      OM22      SG11
 TH 1
+        1.90E-01
 TH 2
+        6.63E-02  4.27E-01
 OM11
+       -1.19E-03 -6.76E-04  1.88E-04
 OM12
+       ......... ......... ......... .........
 OM22
+       -1.78E-05  2.57E-04 -9.44E-07 .........  2.27E-06
 SG11
+       -7.00E-07  2.65E-04  3.82E-06 ......... -8.60E-07  4.28E-06

 ********************               FIRST ORDER CONDITIONAL ESTIMATION WITH INTERACTION              ********************
 ********************                          CORRELATION MATRIX OF ESTIMATE                        ********************

            TH 1      TH 2      OM11      OM12      OM22      SG11
 TH 1
+        4.36E-01
 TH 2
+        2.33E-01  6.54E-01
 OM11
+       -1.99E-01 -7.54E-02  1.37E-02
 OM12
+       ......... ......... ......... .........
 OM22
+       -2.71E-02  2.61E-01 -4.57E-02 .........  1.51E-03
 SG11
+       -7.77E-04  1.96E-01  1.34E-01 ......... -2.76E-01  2.07E-03
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 Elapsed finaloutput time in seconds:     0.02
 #CPUT: Total CPU Time in Seconds,        1.153
